import logging
import os
from typing import Annotated, Optional
import qt
import vtk
from vtk.util.numpy_support import numpy_to_vtk
import random
import time
import uuid
import numpy as np

# import Simulations.SOFASimulationMulti as multi

import slicer
from slicer.i18n import tr as _
from slicer.i18n import translate
from slicer.ScriptedLoadableModule import *
from slicer.util import VTKObservationMixin
from slicer.parameterNodeWrapper import (
    parameterNodeWrapper,
    WithinRange,
)

from slicer import vtkMRMLMarkupsLineNode
from slicer import vtkMRMLMarkupsNode
from slicer import vtkMRMLMarkupsROINode
from slicer import vtkMRMLModelNode
from slicer import vtkMRMLSequenceBrowserNode
from slicer import vtkMRMLSequenceNode
from slicer import vtkMRMLTransformNode

from SofaEnvironment import Sofa
from SlicerSofa import SlicerSofaLogic

#
# MultiMaterialSimulation
#


class MultiMaterialSimulation(ScriptedLoadableModule):
    """Uses ScriptedLoadableModule base class, available at:
    https://github.com/Slicer/Slicer/blob/main/Base/Python/slicer/ScriptedLoadableModule.py
    """

    def __init__(self, parent):
        ScriptedLoadableModule.__init__(self, parent)
        self.parent.title = _("Multi-Material Simulation")
        self.parent.categories = [translate("qSlicerAbstractCoreModule", "Examples")]
        self.parent.dependencies = []
        self.parent.contributors = ["Rafael Palomar (Oslo University Hospital), Paul Baksic (INRIA), Steve Pieper (Isomics, inc.), Andras Lasso (Queen's University), Sam Horvath (Kitware, inc.)"]
        self.parent.helpText = _("""This is an example module to use the SOFA framework to do multi-material simulation""")
        self.parent.acknowledgementText = _("""This project was funded by Oslo Universtiy Hospital""")

        # Additional initialization step after application startup is complete
        slicer.app.connect("startupCompleted()", registerSampleData)

#
# Register sample data sets in Sample Data module
#


def registerSampleData():
    """Add data sets to Sample Data module."""

    import SampleData

    iconsPath = os.path.join(os.path.dirname(__file__), "Resources/Icons")

    sofaDataURL= 'https://github.com/rafaelpalomar/SlicerSofaTestingData/releases/download/'

    # To ensure that the source code repository remains small (can be downloaded and installed quickly)
    # it is recommended to store data sets that are larger than a few MB in a Github release.

    # Right lung low poly tetrahedral mesh dataset
    SampleData.SampleDataLogic.registerCustomSampleDataSource(
        category='SOFA',
        sampleName='RightLungLowTetra',
        thumbnailFileName=os.path.join(iconsPath, 'RightLungLowTetra.png'),
        uris=sofaDataURL+ 'SHA256/a35ce6ca2ae565fe039010eca3bb23f5ef5f5de518b1c10257f12cb7ead05c5d',
        fileNames='RightLungLowTetra.vtk',
        checksums='SHA256:a35ce6ca2ae565fe039010eca3bb23f5ef5f5de518b1c10257f12cb7ead05c5d',
        nodeNames='RightLung',
        loadFileType='ModelFile'
    )

#
# MultiMaterialSimulationParameterNode
#

@parameterNodeWrapper
class MultiMaterialSimulationParameterNode:
    """
    The parameters needed by module.
    """
    #Simulation data
    simulationModelNode: vtkMRMLModelNode
    shellStaticModelNode: vtkMRMLModelNode
    shellMovingModelNode: vtkMRMLModelNode
    DeviceTransformNode: vtkMRMLTransformNode
    boundaryROI: vtkMRMLMarkupsROINode
    gravityVector: vtkMRMLMarkupsLineNode
    gravityMagnitude: int
    sequenceNode: vtkMRMLSequenceNode
    sequenceBrowserNode: vtkMRMLSequenceBrowserNode
    #Simulation control
    dt: float
    totalSteps: int
    currentStep: int
    simulationRunning: bool

    def getBoundaryROI(self):

        if self.boundaryROI is None:
            return [0.0]*6

        center = [0]*3
        self.boundaryROI.GetCenter(center)
        size = self.boundaryROI.GetSize()

        # Calculate min and max RAS bounds from center and size
        R_min = center[0] - size[0] / 2
        R_max = center[0] + size[0] / 2
        A_min = center[1] - size[1] / 2
        A_max = center[1] + size[1] / 2
        S_min = center[2] - size[2] / 2
        S_max = center[2] + size[2] / 2

        # Return the two opposing bounds corners
        # First corner: (minL, minP, minS), Second corner: (maxL, maxP, maxS)
        return [R_min, A_min, S_min, R_max, A_max, S_max]

    def getGravityVector(self):

        if self.gravityVector is None:
            return [0.0]*3

        p1 = self.gravityVector.GetNthControlPointPosition(0)
        p2 = self.gravityVector.GetNthControlPointPosition(1)
        gravity_vector = np.array([p2[0]-p1[0], p2[1]-p1[1], p2[2]-p1[2]])
        magnitude = np.linalg.norm(gravity_vector)
        normalized_gravity_vector = gravity_vector / magnitude if magnitude != 0 else gravity_vector

        return normalized_gravity_vector*self.gravityMagnitude

    def getModelPointsArray(self):
        """
        Convert the point positions from the VTK model to a Python list.
        """
        # Get the unstructured grid from the model node
        unstructured_grid = self.simulationModelNode.GetPolyData()

        # Extract point data from the unstructured grid
        points = unstructured_grid.GetPoints()
        num_points = points.GetNumberOfPoints()

        # Convert the VTK points to a list
        point_coords = []
        for i in range(num_points):
            point_coords.append(points.GetPoint(i))

        return point_coords

    def getModelCellsArray(self):
        """
        Convert the cell connectivity from the VTK model to a Python list.
        """
        # Get the unstructured grid from the model node
        unstructured_grid = self.simulationModelNode.GetUnstructuredGrid()

        # Extract cell data from the unstructured grid
        cells = unstructured_grid.GetCells()
        cell_array = vtk.util.numpy_support.vtk_to_numpy(cells.GetData())

        # The first integer in each cell entry is the number of points per cell (always 4 for tetrahedra)
        # Followed by the point indices
        num_cells = unstructured_grid.GetNumberOfCells()
        cell_connectivity = []

        # Fill the cell connectivity list
        idx = 0
        for i in range(num_cells):
            num_points = cell_array[idx]  # Should always be 4 for tetrahedra
            cell_connectivity.append(cell_array[idx+1:idx+1+num_points].tolist())
            idx += num_points + 1

        return cell_connectivity

#
# MultiMaterialSimulationWidget
#

class MultiMaterialSimulationWidget(ScriptedLoadableModuleWidget, VTKObservationMixin):
    """Uses ScriptedLoadableModuleWidget base class, available at:
    https://github.com/Slicer/Slicer/blob/main/Base/Python/slicer/ScriptedLoadableModule.py
    """

    def __init__(self, parent=None) -> None:
        """Called when the user opens the module the first time and the widget is initialized."""
        ScriptedLoadableModuleWidget.__init__(self, parent)
        VTKObservationMixin.__init__(self)  # needed for parameter node observation
        self.logic = None
        self.parameterNode = None
        self.parameterNodeGuiTag = None
        self.timer = qt.QTimer(parent)
        self.timer.timeout.connect(self.simulationStep)

    def setup(self) -> None:
        """Called when the user opens the module the first time and the widget is initialized."""
        ScriptedLoadableModuleWidget.setup(self)

        # Load widget from .ui file (created by Qt Designer).
        # Additional widgets can be instantiated manually and added to self.layout.
        uiWidget = slicer.util.loadUI(self.resourcePath("UI/MultiMaterialSimulation.ui"))
        self.layout.addWidget(uiWidget)
        self.ui = slicer.util.childWidgetVariables(uiWidget)

        # Create logic class. Logic implements all computations that should be possible to run
        # in batch mode, without a graphical user interface.
        self.logic = MultiMaterialSimulationLogic()

        # Set scene in MRML widgets. Make sure that in Qt designer the top-level qMRMLWidget's
        # "mrmlSceneChanged(vtkMRMLScene*)" signal in is connected to each MRML widget's.
        # "setMRMLScene(vtkMRMLScene*)" slot.
        uiWidget.setMRMLScene(slicer.mrmlScene)

        # Connections

        # These connections ensure that we update parameter node when scene is closed
        self.addObserver(slicer.mrmlScene, slicer.mrmlScene.StartCloseEvent, self.onSceneStartClose)
        self.addObserver(slicer.mrmlScene, slicer.mrmlScene.EndCloseEvent, self.onSceneEndClose)

        self.ui.startSimulationPushButton.connect("clicked()", self.startSimulation)
        self.ui.stopSimulationPushButton.connect("clicked()", self.stopSimulation)
        self.ui.addBoundaryROIPushButton.connect("clicked()", self.logic.addBoundaryROI)
        self.ui.addGravityVectorPushButton.connect("clicked()", self.logic.addGravityVector)
        self.ui.addDeviceTransformPushButton.connect("clicked()", self.logic.addDeviceTransform)
        self.ui.addRecordingSequencePushButton.connect("clicked()", self.logic.addRecordingSequence)

        self.initializeParameterNode()
        self.logic.getParameterNode().AddObserver(vtk.vtkCommand.ModifiedEvent, self.updateSimulationGUI)

    def cleanup(self) -> None:
        """Called when the application closes and the module widget is destroyed."""
        self.timer.stop()
        self.logic.stopSimulation()
        self.logic.clean()
        self.removeObservers()

    def enter(self) -> None:
        # """Called each time the user opens this module."""
        # # Make sure parameter node exists and observed
        self.initializeParameterNode()

    def exit(self) -> None:
        """Called each time the user opens a different module."""
        # Do not react to parameter node changes (GUI will be updated when the user enters into the module)
        if self.parameterNode:
            self.parameterNode.disconnectGui(self.parameterNodeGuiTag)
            self.parameterNodeGuiTag = None

    def onSceneStartClose(self, caller, event) -> None:
        """Called just before the scene is closed."""
        # Parameter node will be reset, do not use it anymore
        self.setParameterNode(None)

    def onSceneEndClose(self, caller, event) -> None:
        """Called just after the scene is closed."""
        # If this module is shown while the scene is closed then recreate a new parameter node immediately
        if self.parent.isEntered:
            self.initializeParameterNode()

    def initializeParameterNode(self) -> None:
        # Parameter node stores all user choices in parameter values, node selections, etc.
        # so that when the scene is saved and reloaded, these settings are restored.

        if self.logic:
            self.setParameterNode(self.logic.getParameterNode())
            self.logic.resetParameterNode()

    def setParameterNode(self, inputParameterNode: Optional[MultiMaterialSimulationParameterNode]) -> None:
        """
        Set and observe parameter node.
        Observation is needed because when the parameter node is changed then the GUI must be updated immediately.
        """
        if self.parameterNode:
            self.parameterNode.disconnectGui(self.parameterNodeGuiTag)
        self.parameterNode = inputParameterNode
        if self.parameterNode:
            # Note: in the .ui file, a Qt dynamic property called "SlicerParameterName" is set on each
            # ui element that needs connection.
            self.parameterNodeGuiTag = self.parameterNode.connectGui(self.ui)

    def updateSimulationGUI(self, caller, event):
        """This enables/disables the simulation buttons according to the state of the parameter node"""
        self.ui.startSimulationPushButton.setEnabled(not self.logic.isSimulationRunning and
                                                     self.logic.getParameterNode().simulationModelNode is not None)
        self.ui.stopSimulationPushButton.setEnabled(self.logic.isSimulationRunning)

    def startSimulation(self):
        self.logic.dt = self.ui.dtSpinBox.value
        self.logic.totalSteps = self.ui.totalStepsSpinBox.value
        self.logic.currentStep = self.ui.currentStepSpinBox.value
        self.logic.startSimulation()
        self.timer.start(0) #This timer drives the simulation updates

    def stopSimulation(self):
        self.timer.stop()
        self.logic.stopSimulation()

    def simulationStep(self):
       self.logic.simulationStep(self.parameterNode)

#
# MultiMaterialSimulationLogic
#

class MultiMaterialSimulationLogic(SlicerSofaLogic):
    """This class should implement all the actual
    computation done by your module.  The interface
    should be such that other python code can import
    this class and make use of the functionality without
    requiring an instance of the Widget.
    Uses ScriptedLoadableModuleLogic base class, available at:
    https://github.com/Slicer/Slicer/blob/main/Base/Python/slicer/ScriptedLoadableModule.py
    """

    def __init__(self) -> None:
        """Called when the logic class is instantiated. Can be used for initializing member variables."""
        super().__init__()
        self.connectionStatus = 0
        self.boxROI = None
        self.mouseInteractor = None

    def updateSofa(self, parameterNode) -> None:
        pass
        # if parameterNode is not None:
        #     self.BoxROI.box = [parameterNode.getBoundaryROI()]
        # if parameterNode.gravityVector is not None:
        #     self.rootNode.gravity = parameterNode.getGravityVector()

    def updateMRML(self, parameterNode) -> None:
        points_vtk = numpy_to_vtk(num_array=self.mechanicalObject.position.array()*1000, deep=True, array_type=vtk.VTK_FLOAT)
        vtk_points = vtk.vtkPoints()
        vtk_points.SetData(points_vtk)
        parameterNode.simulationModelNode.GetPolyData().SetPoints(vtk_points)

        # #meshPointsArray = self.mechanicalState.position.array()
        # meshPointsArray = self.mechanicalObject.position.array()
        # modelPointsArray = slicer.util.arrayFromModelPoints(parameterNode.simulationModelNode)
        # modelPointsArrayNew = meshPointsArray
        # modelPointsArray[:] = modelPointsArrayNew
        # slicer.util.arrayFromModelPointsModified(parameterNode.simulationModelNode)

    def getParameterNode(self):
        return MultiMaterialSimulationParameterNode(super().getParameterNode())

    def resetParameterNode(self):
        if self.getParameterNode():
            self.getParameterNode().simulationModelNode = None
            self.getParameterNode().boundaryROI = None
            self.getParameterNode().gravityVector = None
            self.getParameterNode().sequenceNode = None
            self.getParameterNode().sequenceBrowserNode = None
            self.getParameterNode().dt = 0.01
            self.getParameterNode().currentStep = 0
            self.getParameterNode().totalSteps = -1

    def getSimulationController(self):
        return self.simulationController

    def startSimulation(self) -> None:
        sequenceNode = self.getParameterNode().sequenceNode
        browserNode = self.getParameterNode().sequenceBrowserNode
        simulationModelNode = self.getParameterNode().simulationModelNode

        # Synchronize and set up the sequence browser node
        if None not in [sequenceNode, browserNode, simulationModelNode]:
            browserNode.AddSynchronizedSequenceNodeID(sequenceNode.GetID())
            browserNode.AddProxyNode(simulationModelNode, sequenceNode, False)
            browserNode.SetRecording(sequenceNode, True)
            browserNode.SetRecordingActive(True)

        super().startSimulation(self.getParameterNode())
        self._simulationRunning = True
        self.getParameterNode().Modified()

    def stopSimulation(self) -> None:
        super().stopSimulation()
        self._simulationRunning = False
        browserNode = self.getParameterNode().sequenceBrowserNode
        if browserNode is not None:
            browserNode.SetRecordingActive(False)
        self.getParameterNode().Modified()

    def onSimulationModelNodeModified(self, caller, event) -> None:
        if self.getParameterNode().simulationModelNode.GetUnstructuredGrid() is not None:
            self.getParameterNode().simulationModelNode.GetUnstructuredGrid().SetPoints(caller.GetPolyData().GetPoints())
        elif self.getParameterNode().simulationModelNode.GetPolyData() is not None:
            self.getParameterNode().simulationModelNode.GetPolyData().SetPoints(caller.GetPolyData().GetPoints())

    def addBoundaryROI(self) -> None:
        roiNode = slicer.mrmlScene.AddNewNodeByClass("vtkMRMLMarkupsROINode")
        mesh = None
        bounds = None

        if self.getParameterNode().simulationModelNode is not None:
            if self.getParameterNode().simulationModelNode.GetUnstructuredGrid() is not None:
                mesh = self.getParameterNode().simulationModelNode.GetUnstructuredGrid()
            elif self.getParameterNode().simulationModelNode.GetPolyData() is not None:
                mesh = self.getParameterNode().simulationModelNode.GetPolyData()

        if mesh is not None:
            bounds = mesh.GetBounds()
            center = [(bounds[0] + bounds[1])/2.0, (bounds[2] + bounds[3])/2.0, (bounds[4] + bounds[5])/2.0]
            size = [abs(bounds[1] - bounds[0])/2.0, abs(bounds[3] - bounds[2])/2.0, abs(bounds[5] - bounds[4])/2.0]
            roiNode.SetXYZ(center)
            roiNode.SetRadiusXYZ(size[0], size[1], size[2])

        self.getParameterNode().boundaryROI = roiNode

    def addGravityVector(self) -> None:
        # Create a new line node for the gravity vector
        gravityVector = slicer.vtkMRMLMarkupsLineNode()
        gravityVector.SetName("Gravity")
        mesh = None

        # Check if there is a model node set in the parameter node and get its mesh
        if self.getParameterNode().simulationModelNode is not None:
            if self.getParameterNode().simulationModelNode.GetUnstructuredGrid() is not None:
                mesh = self.getParameterNode().simulationModelNode.GetUnstructuredGrid()
            elif self.getParameterNode().simulationModelNode.GetPolyData() is not None:
                mesh = self.getParameterNode().simulationModelNode.GetPolyData()

        # If a mesh is found, compute its bounding box and center
        if mesh is not None:
            bounds = mesh.GetBounds()

            # Calculate the center of the bounding box
            center = [(bounds[0] + bounds[1])/2.0, (bounds[2] + bounds[3])/2.0, (bounds[4] + bounds[5])/2.0]

            # Calculate the vector's start and end points along the Y-axis, centered on the bounding box
            startPoint = [center[0], bounds[2], center[2]]  # Start at the bottom of the bounding box
            endPoint = [center[0], bounds[3], center[2]]  # End at the top of the bounding box

            # Adjust the start and end points to center the vector in the bounding box
            vectorLength = endPoint[1] - startPoint[1]
            midPoint = startPoint[1] + vectorLength / 2.0
            startPoint[1] = midPoint - vectorLength / 2.0
            endPoint[1] = midPoint + vectorLength / 2.0

            # Add control points to define the line
            gravityVector.AddControlPoint(vtk.vtkVector3d(startPoint))
            gravityVector.AddControlPoint(vtk.vtkVector3d(endPoint))

        # Add the gravity vector line node to the scene
        gravityVector = slicer.mrmlScene.AddNode(gravityVector)
        if gravityVector is not None:
            gravityVector.CreateDefaultDisplayNodes()

        self.getParameterNode().gravityVector = gravityVector


    def addDeviceTransform(self) -> None:
        transformNode = slicer.mrmlScene.AddNewNodeByClass("vtkMRMLTransformNode", "Device Transform")
        transformNode.CreateDefaultDisplayNodes()
        self.getParameterNode().DeviceTransformNode = transformNode

    def addRecordingSequence(self) -> None:

        browserNode = self.getParameterNode().sequenceBrowserNode
        modelNode = self.getParameterNode().simulationModelNode

        # Ensure there is a sequence browser node; create if not present
        if browserNode is None:
            browserNode = slicer.mrmlScene.AddNewNodeByClass('vtkMRMLSequenceBrowserNode', "SOFA Simulation")
            browserNode.SetPlaybackActive(False)
            browserNode.SetRecordingActive(False)
            self.getParameterNode().sequenceBrowserNode = browserNode  # Update the parameter node reference

        sequenceNode = slicer.vtkMRMLSequenceNode()

        # Configure the sequence node based on the proxy model node
        if modelNode is not None:
            sequenceNodeName = modelNode.GetName() + "-Sequence"
            sequenceNode.SetName(sequenceNodeName)

        # Now add the configured sequence node to the scene
        slicer.mrmlScene.AddNode(sequenceNode)

        self.getParameterNode().sequenceNode = sequenceNode  # Update the parameter node reference

        # Configure index name and unit based on the master sequence node, if present
        masterSequenceNode = browserNode.GetMasterSequenceNode()
        if masterSequenceNode:
            sequenceNode.SetIndexName(masterSequenceNode.GetIndexName())
            sequenceNode.SetIndexUnit(masterSequenceNode.GetIndexUnit())


    def createScene(self, parameterNode) -> Sofa.Core.Node:
        from stlib3.scene import MainHeader, ContactHeader
        from stlib3.solver import DefaultSolver
        from stlib3.physics.deformable import ElasticMaterialObject
        from stlib3.physics.rigid import Floor
        from splib3.numerics import Vec3

        rootNode = Sofa.Core.Node()

        MainHeader(rootNode, plugins=[
            "Sofa.Component.IO.Mesh",
            "Sofa.Component.LinearSolver.Direct",
            "Sofa.Component.LinearSolver.Iterative",
            "Sofa.Component.Mapping.Linear",
            "Sofa.Component.Mass",
            "Sofa.Component.ODESolver.Backward",
            "Sofa.Component.Setting",
            "Sofa.Component.SolidMechanics.FEM.Elastic",
            "Sofa.Component.StateContainer",
            "Sofa.Component.Topology.Container.Dynamic",
            "Sofa.Component.Visual",
            "Sofa.GL.Component.Rendering3D",
            "Sofa.Component.AnimationLoop",
            "Sofa.Component.Collision.Detection.Algorithm",
            "Sofa.Component.Collision.Detection.Intersection",
            "Sofa.Component.Collision.Geometry",
            "Sofa.Component.Collision.Response.Contact",
            "Sofa.Component.Constraint.Lagrangian.Solver",
            "Sofa.Component.Constraint.Lagrangian.Correction",
            "Sofa.Component.LinearSystem",
            "Sofa.Component.MechanicalLoad",
            "MultiThreading",
            "Sofa.Component.SolidMechanics.Spring",
            "Sofa.Component.Constraint.Lagrangian.Model",
            "Sofa.Component.Mapping.NonLinear",
            "Sofa.Component.Topology.Container.Constant",
            "Sofa.Component.Topology.Mapping",
            "Sofa.Component.Engine.Select",
            "Sofa.Component.Constraint.Projective",
            "SofaIGTLink",
            "Sofa.Component.Topology.Container.Grid"
        ])

        rootNode.dt = 0.02
        rootNode.gravity = [0, 0, 0]

        rootNode.addObject('DefaultAnimationLoop', parallelODESolving=True)
        rootNode.addObject('VisualStyle', displayFlags="showBehaviorModels showForceFields")
        rootNode.addObject('DefaultPipeline', depth=6, verbose=0, draw=0)
        rootNode.addObject('ParallelBruteForceBroadPhase')
        rootNode.addObject('BVHNarrowPhase')
        rootNode.addObject('ParallelBVHNarrowPhase')
        rootNode.addObject('MinProximityIntersection', name="Proximity", alarmDistance=0.005, contactDistance=0.003)
        rootNode.addObject('DefaultContactManager', name="Response", response="PenalityContactForceField")
        #rootNode.addObject('FreeMotionAnimationLoop', parallelODESolving=True, parallelCollisionDetectionAndFreeMotion=True)
        #rootNode.addObject('GenericConstraintSolver', maxIterations=10, multithreading=True, tolerance=1.0e-3)

        myo = rootNode.addChild('Myo')
        myo.addObject('MeshOBJLoader', name="meshLoader", filename="/home/rafael/Documents/SOFA_Data/myo/segmentation-models/merged_dec1.obj", scale3d=[-0.001, -0.001, 0.001])
        myo.addObject('SparseGridTopology', n=[24, 24, 24], position="@meshLoader.position")
        myo.addObject('EulerImplicitSolver', rayleighStiffness=0.1, rayleighMass=0.1)
        myo.addObject('CGLinearSolver', iterations=100, tolerance=1e-5, threshold=1e-5)
        self.mechanicalObject = myo.addObject('MechanicalObject', name='MO')
        myo.addObject('UniformMass', totalMass=0.5)
        myo.addObject('ParallelHexahedronFEMForceField', name="FEM", youngModulus=50000000, poissonRatio=0.40, method="large")

        visu = myo.addChild('Visu')
        visu.addObject('OglModel', name="Visual", src="@../meshLoader", color="blue")
        visu.addObject('BarycentricMapping', input="@..", output="@Visual")

        surf = myo.addChild('Surf')
        surf.addObject('MeshTopology', src="@../meshLoader")
        self.mechanicalObject = surf.addObject('MechanicalObject', src="@../meshLoader")
        surf.addObject('TriangleCollisionModel', selfCollision=True)
        surf.addObject('LineCollisionModel')
        surf.addObject('PointCollisionModel')
        surf.addObject('BarycentricMapping')

        self.BoxROI = myo.addObject('BoxROI', template="Vec3", box=[0.02, -0.2, -0.1, 0.05, 0, -0.3], drawBoxes=False,
                                          position="@../MO.rest_position", name="FixedROI",
                                          computeTriangles=False, computeTetrahedra=False, computeEdges=False)
        myo.addObject('FixedConstraint', indices="@FixedROI.indices")


        # myo.addObject('BoxConstraint', name="fixed", box=[-0.05, 0, -0.1, -0.02, 0.2, -0.3], drawBoxes=False)
        boxForce = myo.addObject('BoxROI', name="boxForce", box=[-0.17, -0.15, -0.2, -0.13, -0.05, -0.3], drawBoxes=True)
        myo.addObject('AffineMovementConstraint', name="bilinearConstraint", template="Vec3d", indices="@boxForce.indices", meshIndices="@boxForce.indices",
                     translation=[0.05, 0, 0], rotation=[[1, 0, 0], [0, 1, 0], [0, 0, 1]], drawConstrainedPoints=1, beginConstraintTime=0, endConstraintTime=1)
        # # myo.addObject('ConstantForceField', indices="@boxForce.indices", totalForce=[-3, 0, 0, 0, 0, 0, 1], showArrowSize=1)

        return rootNode


#
# MultiMaterialSimulationTest
#


class MultiMaterialSimulationTest(ScriptedLoadableModuleTest):
    """
    This is the test case for your scripted module.
    Uses ScriptedLoadableModuleTest base class, available at:
    https://github.com/Slicer/Slicer/blob/main/Base/Python/slicer/ScriptedLoadableModule.py
    """

    def setUp(self):
        """Do whatever is needed to reset the state - typically a scene clear will be enough."""
        slicer.mrmlScene.Clear()

    def runTest(self):
        """Run as few or as many tests as needed here."""
        pass
